P_out := 600 W
V_in := 800 V
V_out := 80 V
B_max := 0.15 T
f_s := 100000 Hz
η := 0.98
J := 5 A/mm^2
P_in := P_out/η = 612.245 W
# 电流计算 | 视在功率
I_inavg := P_in/V_in = 0.765306 A
I_prms := I_inavg*1.11 = 0.84949 A
P_t := P_in + P_out = 1212.24 W
I_outavg := P_out/V_out = 7.5 A
I_srms := I_outavg*1.11 = 8.325 A
K_f := 4  # Ap计算：
K_u := 0.3
A_p := P_t/(K_f*K_u*B_max*f_s*J) = 13469.4 mm^4
# 磁芯定义：（PQ3230） | 札数计算：
A_e := 161 mm^2
N_pclac := V_in/(4*f_s*B_max*A_e) = 82.8157
A_w := 145 mm^2
A_pc := A_e*A_w = 23345 mm^4
n := V_in/V_out = 10
验算：
N_p := ceil(N_pclac) = 83
B_work := V_in/(4*f_s*N_p*A_e) = 0.149667 T
N_s := round(N_p/n) = 8
# 最大漆包线直径： | 初级侧的导线面积：
δ := (66.1/sqrt(f_s/Hz)) mm = 0.209027 mm
A_cup := I_prms/J = 0.169898 mm^2
R_cup := 2*sqrt(A_cup/π) = 0.465103 mm
次级侧的导线面积：
D_max := 2*δ = 0.418053 mm
A_cus := I_srms/J = 1.665 mm^2
R_cus := 2*sqrt(A_cus/π) = 1.456 mm
漏感：
u := 4*π*10^-7 H/m
b_w := 18.5 mm
l_w := 13.5 mm
# 初级和次级铜线层的总物理厚度 | 初次级之间的主绝缘层厚度
h_cu := 10 mm
h_ins := 2 mm
L_k := u*N_p^2*l_w/b_w*(h_cu/3 + h_ins) = 33.692 μH
